# -*- coding: utf-8 -*-
"""
Created on Wed Apr 24 15:39:45 2024

@author: lab_Harold
"""

# import Sofa
import Sofa.Core
import Constants
import os
import csv
import numpy as np

LadoCubo = Constants.LadoCubo
PSI = 6.8

path = os.path.dirname(os.path.abspath(__file__))+'/mesh/'


class Controller(Sofa.Core.Controller):

    def __init__(self, *args, **kwargs):
        super().__init__(*args, **kwargs)
        print(" Python::__init__::" + str(self.name.value))

        # Bandera para controlar la animacion
        self.animation_finished = False

        # Inicializar atributos con valores de kwargs
        self.RootNode = kwargs['RootNode']
        self.SPC = kwargs['SPC']
        self.Maxpressure = 6.89 * PSI # PSI to KPa
        self.Increment = self.Maxpressure/500 #KPa
        self.Pressure = 0
        self.Decreasing = False
        self.EndEffectorMO = kwargs['EndEffectorMO']
        self.EndEffectorMO2 = kwargs['EndEffectorMO2']

        # Definir ruta de archivo csv
        self.csv_file_path = "end_effector_data_Estirar_Hyper_YMA.csv"

        # Crear archivo CSV y escribir encabezados si no existe
        if not os.path.exists(self.csv_file_path):
            with open(self.csv_file_path, mode='w', newline='') as file:
                writer = csv.writer(file)
                writer.writerow(["Time", "Pressure","P1_Position_X", "P1_Position_Y" ,"P1_Position_Z","P2_Position_X", "P2_Position_Y" ,"P2_Position_Z"])

        print('Finished Init')

    def save_end_effector_data(self, time):
        position = self.EndEffectorMO.position.value
        position2 = self.EndEffectorMO2.position.value

        try:
            with open(self.csv_file_path, mode='a', newline='') as file:
                writer = csv.writer(file)
                writer.writerow([time,self.Pressure,position[0][0],position[0][1],position[0][2],position2[0][0],position2[0][1],position2[0][2]])
        except Exception as e:
            print(f"Error al escribir en archivo csv:{e}")

    def update_pressure_increase(self, pressure, spc):
        pressure += self.Increment
        if pressure > self.Maxpressure and self.animation_finished==False:
            pressure = self.Maxpressure
        spc.value.value = [pressure]
        return pressure

    def update_pressure_decrease(self, pressure, spc):
        pressure -= self.Increment
        if pressure < 0 and not self.animation_finished:
            pressure = 0
        spc.value.value = [pressure]
        return pressure


    def onAnimateBeginEvent(self, eventType):
        # print(f"Current End-Effector position: {self.EndEffectorMO.position.value}")
        # print(f"pressure: {self.Pressure}")

        # Aquí obtienes el tiempo actual de la simulación
        current_time = self.RootNode.time.value

        # Imprimir mensaje si la animación ha terminado
        if self.animation_finished:
            # print("animación terminada")
            self.RootNode.dt = 0
            self.Pressure = 0
            return

        # Guardar datos del EndEffector
        self.save_end_effector_data(current_time)

        if not self.Decreasing:
            # Incrementar presiones
            self.Pressure = self.update_pressure_increase(self.Pressure, self.SPC)

            if self.Pressure >= self.Maxpressure:
                self.Decreasing = True
        else:
            # Decrementar presiones
            self.Pressure = self.update_pressure_decrease(self.Pressure, self.SPC)

            if self.Pressure <= 0:
                self.Decreasing = False
                self.animation_finished = True


def createScene(rootNode):

                rootNode.addObject(
                    "RequiredPlugin",
                    pluginName="""SofaPython3
                    SoftRobots
                    SoftRobots.Inverse
                    Sofa.Component.AnimationLoop
                    Sofa.Component.Constraint.Lagrangian.Correction
                    Sofa.Component.Constraint.Lagrangian.Solver
                    Sofa.Component.Engine.Select
                    Sofa.Component.IO.Mesh
                    Sofa.Component.LinearSolver.Direct
                    Sofa.Component.LinearSolver.Iterative
                    Sofa.Component.Mapping.Linear
                    Sofa.Component.Mapping.NonLinear
                    Sofa.Component.Mass
                    Sofa.Component.ODESolver.Backward
                    Sofa.Component.Setting
                    Sofa.Component.SolidMechanics.FEM.Elastic
                    Sofa.Component.SolidMechanics.Spring
                    Sofa.Component.StateContainer
                    Sofa.Component.Topology.Container.Constant
                    Sofa.Component.Topology.Container.Dynamic
                    Sofa.Component.Visual
                    Sofa.Component.Topology.Mapping
                    Sofa.Component.Collision.Geometry
                    Sofa.Component.SolidMechanics.FEM.HyperElastic
                    Sofa.GL.Component.Rendering3D
                    Sofa.GL.Component.Shader
                    MultiThreading"""
                )

                rootNode.addObject(
                    "VisualStyle",
                    displayFlags="""
                        hideWireframe
                        showBehaviorModels
                        hideCollisionModels
                        hideBoundingCollisionModels
                        showForceFields
                        showInteractionForceFields""",
                )

                rootNode.addObject('InteractiveCamera',name='cam', position=[0,0,1], projectionType=1)

                rootNode.addObject('RequiredPlugin', name='Sofa.Component.Topology.Mapping') # Needed to use components [Tetra2TriangleTopologicalMapping]
                rootNode.addObject('FreeMotionAnimationLoop')
                # rootNode.addObject('GenericConstraintSolver', maxIterations=100, tolerance = 0.0000001)
                rootNode.addObject('BlockGaussSeidelConstraintSolver', maxIterations=100, tolerance=1e-7)
                rootNode.dt = 0.01

		#cubito
                cubito = rootNode.addChild('cubito')
                cubito.addObject('EulerImplicitSolver', name='odesolver')
                cubito.addObject('SparseLDLSolver', name='preconditioner', template='CompressedRowSparseMatrixMat3x3d')
                cubito.addObject('PCGLinearSolver', iterations=50, name='linearsolver', tolerance=1e-5, preconditioner='@preconditioner')

                loader = cubito.addObject('MeshVTKLoader', name='loader', filename='CubitoEstirar.vtk')
                Container = cubito.addObject('TetrahedronSetTopologyContainer', position='@loader.position', tetrahedra='@loader.tetrahedra', name='container')
                cubito.addObject('TetrahedronSetTopologyModifier')

                MO = cubito.addObject('MechanicalObject', name='tetras', template='Vec3', showIndices=False)
                cubito.addObject('UniformMass', totalMass=0.5)

                boxROIStiffness = cubito.addObject('BoxROI', name='boxROIStiffness', box=[-14, 18, -14,  14, 21, 14], drawBoxes=True, position="@tetras.rest_position", tetrahedra="@container.tetrahedra")
                boxROIMain = cubito.addObject('BoxROI', name='boxROIMain', box=[-13, 0.5, -13,  13, 19.5, 13], drawBoxes=True, position="@tetras.rest_position", tetrahedra="@container.tetrahedra")

                Container.init()
                MO.init()
                boxROIStiffness.init()
                boxROIMain.init()

                YM_main = 14186 #11186
                YM_stiffROI = YM_main*100

                E_main = YM_main
                nu_main = 0.45
                mu_main = E_main / (2 * (1 + nu_main))
                lam_main = (E_main * nu_main) / ((1 + nu_main) * (1 - 2 * nu_main))

                E_stiff = YM_stiffROI
                nu_stiff = 0.45
                mu_stiff = E_stiff / (2 * (1 + nu_stiff))
                lam_stiff = (E_stiff * nu_stiff) / ((1 + nu_stiff) * (1 - 2 * nu_stiff))

                boxROI = cubito.addObject('BoxROI', name='boxROI', box=[-14,  -1, -14,  14, 2, 14], drawBoxes=True, position="@tetras.rest_position", tetrahedra="@container.tetrahedra")
                cubito.addObject('RestShapeSpringsForceField', points='@boxROI.indices', stiffness=1e12)
                cubito.addObject('GenericConstraintCorrection', linearSolver='@preconditioner')

                modelStiff = cubito.addChild('modelStiff')
                modelStiff.addObject('TetrahedronSetTopologyContainer', position='@../loader.position', tetrahedra="@../boxROIStiffness.tetrahedraInROI", name='container')
                modelStiff.addObject('TetrahedronHyperelasticityFEMForceField', template = 'Vec3d', name='HyperelasticFEM_stiff', materialName='NeoHookean', ParameterSet=[mu_stiff,lam_stiff])

                modelSubTopo1 = cubito.addChild('modelSubTopo1')
                modelSubTopo1.addObject('TetrahedronSetTopologyContainer', position='@../loader.position', tetrahedra="@../boxROIMain.tetrahedraInROI", name='container')
                modelSubTopo1.addObject('TetrahedronHyperelasticityFEMForceField', template='Vec3d', name='HyperelasticFEM_main', materialName='NeoHookean', ParameterSet=[mu_main,lam_main])


        # Punto "End-effector"

                EndEffectorNode = cubito.addChild("EndEffectorNode")
                EndEffectorMO = EndEffectorNode.addObject("MechanicalObject", position=[[0,LadoCubo,0]], showObject=True, showObjectScale=10)
                EndEffectorNode.addObject("BarycentricMapping")

        # Punto "End-effector"

                EndEffectorNode2 = cubito.addChild("EndEffectorNode_2")
                EndEffectorMO2 = EndEffectorNode2.addObject("MechanicalObject", position=[[0,LadoCubo/2,LadoCubo/2]], showObject=True, showObjectScale=10)
                EndEffectorNode2.addObject("BarycentricMapping")


        #cubito/fibers

                FiberNode = cubito.addChild("FiberReinforcementNode")
                Density = 30
                IncrementAngle = 2*np.pi/Density
                Radius = 8
                NLevels = 7
                LevelHeight = 2
                Points = []
                Edges = []
                for i in range(NLevels):
                    for j in range(0,30):
                        Angle = j*IncrementAngle
                        Coords = [Radius*np.cos(Angle), 4+i*LevelHeight, Radius*np.sin(Angle)]
                        Points.append(Coords)
                        if j>=1:
                            Edges.append([i*Density+j-1,i*Density+j])
                            if j==Density-1:
                                Edges.append([i*Density+j, i*Density+j-Density+1])

                FiberNode.addObject("MeshTopology", position=Points, name="Mesh", edges=Edges)
                FiberNode.addObject("MechanicalObject", showObject=True, showObjectScale=10)
                FiberNode.addObject("MeshSpringForceField", linesStiffness=1e9)
                FiberNode.addObject("BarycentricMapping")


		#cubito/cavity
                cavity = cubito.addChild('cavity')
                cavity.addObject('MeshSTLLoader', name='loader', filename='CubitoEstirar_Cavity.stl')
                cavity.addObject('MeshTopology', src='@loader', name='topo')
                cavity.addObject('MechanicalObject', name='cavity')
                SPC = cavity.addObject('SurfacePressureConstraint', triangles='@topo.triangles', value=0, valueType=0)
                #cavity.addObject('BarycentricMapping', name='mapping',  mapForces=True, mapMasses=False)
                cavity.addObject('BarycentricMapping', name='mapping',  mapForces=True, mapMasses=True)


		#cubito/cubitoVisu
                cubitoVisu = cubito.addChild('visu')
                cubitoVisu.addObject("MeshSTLLoader", filename="Cubito_Estirar_visu.stl", name="loader")
                cubitoVisu.addObject("OglModel", src="@loader")
                cubitoVisu.addObject("BarycentricMapping")

                rootNode.addObject(Controller(name="ActuationController", RootNode=rootNode, SPC=SPC,  EndEffectorMO=EndEffectorMO, EndEffectorMO2=EndEffectorMO2 ))

                return rootNode
